PNT SE00001 0.000000000 0.000000000 0.000000000
SETA SE00001 p SE00001
SETA SE00002 se SE00001
COMP SE00002 up
SWEP SE00002 SE00003 tra 0.00000000000 0.00000000000 0.04000000000 2 a
COMP SE00002 do
COMP SE00003 do
SETA SE00004 se SE00001
COMP SE00004 up
SWEP SE00004 SE00005 tra 0.00000000000 0.80000000000 0.00000000000 4 a
COMP SE00004 do
COMP SE00005 do
SETA SE00006 se SE00001
COMP SE00006 up
SWEP SE00006 SE00007 tra 0.50000000000 0.00000000000 0.00000000000 4 a
COMP SE00006 do
COMP SE00007 do
SETA board se SE00001
COMP board up
COMP board do
SETA SE00008 se board
SETR SE00008 se SE00006
SETR SE00008 se SE00007
BIA SE00008 1.000
SETA SE00009 se board
SETR SE00009 se SE00004
SETR SE00009 se SE00005
BIA SE00009 1.000
SETA SE0000A se board
SETR SE0000A se SE00002
SETR SE0000A se SE00003
BIA SE0000A 1.000
SETA air se SE00002
DEL se SE00001
DEL se SE00002
DEL se SE00003
DEL se SE00004
DEL se SE00005
DEL se SE00006
DEL se SE00007
DEL se SE00008
DEL se SE00009
DEL se SE0000A
