PNT SE0000A 0.000000000 0.000000000 0.000000000
SETA SE0000A p SE0000A
SETA SE0000B se SE0000A
COMP SE0000B up
SWEP SE0000B SE0000C tra 0.00000000000 0.00000000000 0.00700000000 2 a
COMP SE0000B do
COMP SE0000C do
SETA SE0000D se SE0000A
COMP SE0000D up
SWEP SE0000D SE0000E tra 0.00000000000 0.00355000000 0.00000000000 1 a
COMP SE0000D do
COMP SE0000E do
SETA SE0000F se SE0000A
COMP SE0000F up
SWEP SE0000F SE0000G tra 0.07500000000 0.00000000000 0.00000000000 4 a
COMP SE0000F do
COMP SE0000G do
SETA SE00009 se SE0000A
COMP SE00009 up
COMP SE00009 do
SETA SE0000H se SE00009
SETR SE0000H se SE0000F
SETR SE0000H se SE0000G
BIA SE0000H 1.000
SETA SE0000I se SE00009
SETR SE0000I se SE0000D
SETR SE0000I se SE0000E
BIA SE0000I 1.000
SETA SE0000J se SE00009
SETR SE0000J se SE0000B
SETR SE0000J se SE0000C
BIA SE0000J 1.000
SETA SE00001 se SE00009
SETA SE00004 se SE0000B
SETA SE00002 se SE0000F
SETA SE00005 se SE0000G
PNT SE0000S 0.000000000 0.000000000 0.007000000
SETA SE0000S p SE0000S
SETA SE0000T se SE0000S
COMP SE0000T up
SWEP SE0000T SE0000U tra 0.00000000000 0.00000000000 0.04300000000 2.0 a
COMP SE0000T do
COMP SE0000U do
SETA SE0000V se SE0000S
COMP SE0000V up
SWEP SE0000V SE0000W tra 0.00000000000 0.00355000000 0.00000000000 1.0 a
COMP SE0000V do
COMP SE0000W do
SETA SE0000X se SE0000S
COMP SE0000X up
SWEP SE0000X SE0000Y tra 0.07500000000 0.00000000000 0.00000000000 4.0 a
COMP SE0000X do
COMP SE0000Y do
SETA SE0000R se SE0000S
COMP SE0000R up
COMP SE0000R do
SETA SE0000Z se SE0000R
SETR SE0000Z se SE0000X
SETR SE0000Z se SE0000Y
BIA SE0000Z 1.000
SETA SE00010 se SE0000R
SETR SE00010 se SE0000V
SETR SE00010 se SE0000W
BIA SE00010 1.000
SETA SE00011 se SE0000R
SETR SE00011 se SE0000T
SETR SE00011 se SE0000U
BIA SE00011 1.000
SETA SE0000K se SE0000R
SETA SE0000L se SE0000X
SETA SE0000M se SE0000V
SETA SE0000N se SE0000T
SETA SE0000O se SE0000Y
SETA SE0000P se SE0000W
SETA SE0000Q se SE0000U
GTOL 0.000001
MERG p SE0000K
MERG l SE0000K
MERG s SE0000K
SETA SE00001 se SE0000K
SETA SE00007 se SE0000Q
SETA SE00002 se SE0000L
SETA SE00005 se SE0000O
SETA SE00003 se SE0000D
SETA SE00003 se SE0000M
SETA SE00008 se SE0000P
PNT SE00013 0.000000000 0.007658333 0.000000000
SETA SE00013 p SE00013
SETA SE00014 se SE00013
COMP SE00014 up
SWEP SE00014 SE00015 tra 0.00000000000 0.00000000000 0.00700000000 2 a
COMP SE00014 do
COMP SE00015 do
SETA SE00016 se SE00013
COMP SE00016 up
SWEP SE00016 SE00017 tra 0.00000000000 0.00355000000 0.00000000000 1 a
COMP SE00016 do
COMP SE00017 do
SETA SE00018 se SE00013
COMP SE00018 up
SWEP SE00018 SE00019 tra 0.07500000000 0.00000000000 0.00000000000 4 a
COMP SE00018 do
COMP SE00019 do
SETA SE00012 se SE00013
COMP SE00012 up
COMP SE00012 do
SETA SE0001A se SE00012
SETR SE0001A se SE00018
SETR SE0001A se SE00019
BIA SE0001A 1.000
SETA SE0001B se SE00012
SETR SE0001B se SE00016
SETR SE0001B se SE00017
BIA SE0001B 1.000
SETA SE0001C se SE00012
SETR SE0001C se SE00014
SETR SE0001C se SE00015
BIA SE0001C 1.000
SETA SE00001 se SE00012
SETA SE00004 se SE00014
SETA SE00002 se SE00018
SETA SE00005 se SE00019
PNT SE0001L 0.000000000 0.007658333 0.007000000
SETA SE0001L p SE0001L
SETA SE0001M se SE0001L
COMP SE0001M up
SWEP SE0001M SE0001N tra 0.00000000000 0.00000000000 0.04300000000 2.0 a
COMP SE0001M do
COMP SE0001N do
SETA SE0001O se SE0001L
COMP SE0001O up
SWEP SE0001O SE0001P tra 0.00000000000 0.00355000000 0.00000000000 1.0 a
COMP SE0001O do
COMP SE0001P do
SETA SE0001Q se SE0001L
COMP SE0001Q up
SWEP SE0001Q SE0001R tra 0.07500000000 0.00000000000 0.00000000000 4.0 a
COMP SE0001Q do
COMP SE0001R do
SETA SE0001K se SE0001L
COMP SE0001K up
COMP SE0001K do
SETA SE0001S se SE0001K
SETR SE0001S se SE0001Q
SETR SE0001S se SE0001R
BIA SE0001S 1.000
SETA SE0001T se SE0001K
SETR SE0001T se SE0001O
SETR SE0001T se SE0001P
BIA SE0001T 1.000
SETA SE0001U se SE0001K
SETR SE0001U se SE0001M
SETR SE0001U se SE0001N
BIA SE0001U 1.000
SETA SE0001D se SE0001K
SETA SE0001E se SE0001Q
SETA SE0001F se SE0001O
SETA SE0001G se SE0001M
SETA SE0001H se SE0001R
SETA SE0001I se SE0001P
SETA SE0001J se SE0001N
GTOL 0.000001
MERG p SE0001D
MERG l SE0001D
MERG s SE0001D
SETA SE00001 se SE0001D
SETA SE00007 se SE0001J
SETA SE00002 se SE0001E
SETA SE00005 se SE0001H
PNT SE00023 0.000000000 0.003550000 0.000000000
SETA SE00023 p SE00023
SETA SE00024 se SE00023
COMP SE00024 up
SWEP SE00024 SE00025 tra 0.00000000000 0.00000000000 0.00700000000 2.0 a
COMP SE00024 do
COMP SE00025 do
SETA SE00026 se SE00023
COMP SE00026 up
SWEP SE00026 SE00027 tra 0.00000000000 0.00410833333 0.00000000000 1.0 a
COMP SE00026 do
COMP SE00027 do
SETA SE00028 se SE00023
COMP SE00028 up
SWEP SE00028 SE00029 tra 0.07500000000 0.00000000000 0.00000000000 4.0 a
COMP SE00028 do
COMP SE00029 do
SETA SE00022 se SE00023
COMP SE00022 up
COMP SE00022 do
SETA SE0002A se SE00022
SETR SE0002A se SE00028
SETR SE0002A se SE00029
BIA SE0002A 1.000
SETA SE0002B se SE00022
SETR SE0002B se SE00026
SETR SE0002B se SE00027
BIA SE0002B 1.000
SETA SE0002C se SE00022
SETR SE0002C se SE00024
SETR SE0002C se SE00025
BIA SE0002C 1.000
SETA SE0001V se SE00022
SETA SE0001W se SE00028
SETA SE0001X se SE00026
SETA SE0001Y se SE00024
SETA SE0001Z se SE00029
SETA SE00020 se SE00027
SETA SE00021 se SE00025
GTOL 0.000001
MERG p SE0001V
MERG l SE0001V
MERG s SE0001V
SETA SE00001 se SE0001V
SETA SE00004 se SE0001Y
SETA SE00002 se SE0001W
SETA SE00005 se SE0001Z
SETA SE00008 se SE00021
SETA SE00008 se SE0001F
SETA SE00008 se SE0001I
PNT SE0002E 0.000000000 0.015316667 0.000000000
SETA SE0002E p SE0002E
SETA SE0002F se SE0002E
COMP SE0002F up
SWEP SE0002F SE0002G tra 0.00000000000 0.00000000000 0.00700000000 2 a
COMP SE0002F do
COMP SE0002G do
SETA SE0002H se SE0002E
COMP SE0002H up
SWEP SE0002H SE0002I tra 0.00000000000 0.00355000000 0.00000000000 1 a
COMP SE0002H do
COMP SE0002I do
SETA SE0002J se SE0002E
COMP SE0002J up
SWEP SE0002J SE0002K tra 0.07500000000 0.00000000000 0.00000000000 4 a
COMP SE0002J do
COMP SE0002K do
SETA SE0002D se SE0002E
COMP SE0002D up
COMP SE0002D do
SETA SE0002L se SE0002D
SETR SE0002L se SE0002J
SETR SE0002L se SE0002K
BIA SE0002L 1.000
SETA SE0002M se SE0002D
SETR SE0002M se SE0002H
SETR SE0002M se SE0002I
BIA SE0002M 1.000
SETA SE0002N se SE0002D
SETR SE0002N se SE0002F
SETR SE0002N se SE0002G
BIA SE0002N 1.000
SETA SE00001 se SE0002D
SETA SE00004 se SE0002F
SETA SE00002 se SE0002J
SETA SE00005 se SE0002K
PNT SE0002W 0.000000000 0.015316667 0.007000000
SETA SE0002W p SE0002W
SETA SE0002X se SE0002W
COMP SE0002X up
SWEP SE0002X SE0002Y tra 0.00000000000 0.00000000000 0.04300000000 2.0 a
COMP SE0002X do
COMP SE0002Y do
SETA SE0002Z se SE0002W
COMP SE0002Z up
SWEP SE0002Z SE00030 tra 0.00000000000 0.00355000000 0.00000000000 1.0 a
COMP SE0002Z do
COMP SE00030 do
SETA SE00031 se SE0002W
COMP SE00031 up
SWEP SE00031 SE00032 tra 0.07500000000 0.00000000000 0.00000000000 4.0 a
COMP SE00031 do
COMP SE00032 do
SETA SE0002V se SE0002W
COMP SE0002V up
COMP SE0002V do
SETA SE00033 se SE0002V
SETR SE00033 se SE00031
SETR SE00033 se SE00032
BIA SE00033 1.000
SETA SE00034 se SE0002V
SETR SE00034 se SE0002Z
SETR SE00034 se SE00030
BIA SE00034 1.000
SETA SE00035 se SE0002V
SETR SE00035 se SE0002X
SETR SE00035 se SE0002Y
BIA SE00035 1.000
SETA SE0002O se SE0002V
SETA SE0002P se SE00031
SETA SE0002Q se SE0002Z
SETA SE0002R se SE0002X
SETA SE0002S se SE00032
SETA SE0002T se SE00030
SETA SE0002U se SE0002Y
GTOL 0.000001
MERG p SE0002O
MERG l SE0002O
MERG s SE0002O
SETA SE00001 se SE0002O
SETA SE00007 se SE0002U
SETA SE00002 se SE0002P
SETA SE00005 se SE0002S
PNT SE0003E 0.000000000 0.011208333 0.000000000
SETA SE0003E p SE0003E
SETA SE0003F se SE0003E
COMP SE0003F up
SWEP SE0003F SE0003G tra 0.00000000000 0.00000000000 0.00700000000 2.0 a
COMP SE0003F do
COMP SE0003G do
SETA SE0003H se SE0003E
COMP SE0003H up
SWEP SE0003H SE0003I tra 0.00000000000 0.00410833333 0.00000000000 1.0 a
COMP SE0003H do
COMP SE0003I do
SETA SE0003J se SE0003E
COMP SE0003J up
SWEP SE0003J SE0003K tra 0.07500000000 0.00000000000 0.00000000000 4.0 a
COMP SE0003J do
COMP SE0003K do
SETA SE0003D se SE0003E
COMP SE0003D up
COMP SE0003D do
SETA SE0003L se SE0003D
SETR SE0003L se SE0003J
SETR SE0003L se SE0003K
BIA SE0003L 1.000
SETA SE0003M se SE0003D
SETR SE0003M se SE0003H
SETR SE0003M se SE0003I
BIA SE0003M 1.000
SETA SE0003N se SE0003D
SETR SE0003N se SE0003F
SETR SE0003N se SE0003G
BIA SE0003N 1.000
SETA SE00036 se SE0003D
SETA SE00037 se SE0003J
SETA SE00038 se SE0003H
SETA SE00039 se SE0003F
SETA SE0003A se SE0003K
SETA SE0003B se SE0003I
SETA SE0003C se SE0003G
GTOL 0.000001
MERG p SE00036
MERG l SE00036
MERG s SE00036
SETA SE00001 se SE00036
SETA SE00004 se SE00039
SETA SE00002 se SE00037
SETA SE00005 se SE0003A
SETA SE00008 se SE0003C
SETA SE00008 se SE0002Q
SETA SE00008 se SE0002T
PNT SE0003P 0.000000000 0.022975000 0.000000000
SETA SE0003P p SE0003P
SETA SE0003Q se SE0003P
COMP SE0003Q up
SWEP SE0003Q SE0003R tra 0.00000000000 0.00000000000 0.00700000000 2 a
COMP SE0003Q do
COMP SE0003R do
SETA SE0003S se SE0003P
COMP SE0003S up
SWEP SE0003S SE0003T tra 0.00000000000 0.00355000000 0.00000000000 1 a
COMP SE0003S do
COMP SE0003T do
SETA SE0003U se SE0003P
COMP SE0003U up
SWEP SE0003U SE0003V tra 0.07500000000 0.00000000000 0.00000000000 4 a
COMP SE0003U do
COMP SE0003V do
SETA SE0003O se SE0003P
COMP SE0003O up
COMP SE0003O do
SETA SE0003W se SE0003O
SETR SE0003W se SE0003U
SETR SE0003W se SE0003V
BIA SE0003W 1.000
SETA SE0003X se SE0003O
SETR SE0003X se SE0003S
SETR SE0003X se SE0003T
BIA SE0003X 1.000
SETA SE0003Y se SE0003O
SETR SE0003Y se SE0003Q
SETR SE0003Y se SE0003R
BIA SE0003Y 1.000
SETA SE00001 se SE0003O
SETA SE00004 se SE0003Q
SETA SE00002 se SE0003U
SETA SE00005 se SE0003V
PNT SE00047 0.000000000 0.022975000 0.007000000
SETA SE00047 p SE00047
SETA SE00048 se SE00047
COMP SE00048 up
SWEP SE00048 SE00049 tra 0.00000000000 0.00000000000 0.04300000000 2.0 a
COMP SE00048 do
COMP SE00049 do
SETA SE0004A se SE00047
COMP SE0004A up
SWEP SE0004A SE0004B tra 0.00000000000 0.00355000000 0.00000000000 1.0 a
COMP SE0004A do
COMP SE0004B do
SETA SE0004C se SE00047
COMP SE0004C up
SWEP SE0004C SE0004D tra 0.07500000000 0.00000000000 0.00000000000 4.0 a
COMP SE0004C do
COMP SE0004D do
SETA SE00046 se SE00047
COMP SE00046 up
COMP SE00046 do
SETA SE0004E se SE00046
SETR SE0004E se SE0004C
SETR SE0004E se SE0004D
BIA SE0004E 1.000
SETA SE0004F se SE00046
SETR SE0004F se SE0004A
SETR SE0004F se SE0004B
BIA SE0004F 1.000
SETA SE0004G se SE00046
SETR SE0004G se SE00048
SETR SE0004G se SE00049
BIA SE0004G 1.000
SETA SE0003Z se SE00046
SETA SE00040 se SE0004C
SETA SE00041 se SE0004A
SETA SE00042 se SE00048
SETA SE00043 se SE0004D
SETA SE00044 se SE0004B
SETA SE00045 se SE00049
GTOL 0.000001
MERG p SE0003Z
MERG l SE0003Z
MERG s SE0003Z
SETA SE00001 se SE0003Z
SETA SE00007 se SE00045
SETA SE00002 se SE00040
SETA SE00005 se SE00043
PNT SE0004P 0.000000000 0.018866667 0.000000000
SETA SE0004P p SE0004P
SETA SE0004Q se SE0004P
COMP SE0004Q up
SWEP SE0004Q SE0004R tra 0.00000000000 0.00000000000 0.00700000000 2.0 a
COMP SE0004Q do
COMP SE0004R do
SETA SE0004S se SE0004P
COMP SE0004S up
SWEP SE0004S SE0004T tra 0.00000000000 0.00410833333 0.00000000000 1.0 a
COMP SE0004S do
COMP SE0004T do
SETA SE0004U se SE0004P
COMP SE0004U up
SWEP SE0004U SE0004V tra 0.07500000000 0.00000000000 0.00000000000 4.0 a
COMP SE0004U do
COMP SE0004V do
SETA SE0004O se SE0004P
COMP SE0004O up
COMP SE0004O do
SETA SE0004W se SE0004O
SETR SE0004W se SE0004U
SETR SE0004W se SE0004V
BIA SE0004W 1.000
SETA SE0004X se SE0004O
SETR SE0004X se SE0004S
SETR SE0004X se SE0004T
BIA SE0004X 1.000
SETA SE0004Y se SE0004O
SETR SE0004Y se SE0004Q
SETR SE0004Y se SE0004R
BIA SE0004Y 1.000
SETA SE0004H se SE0004O
SETA SE0004I se SE0004U
SETA SE0004J se SE0004S
SETA SE0004K se SE0004Q
SETA SE0004L se SE0004V
SETA SE0004M se SE0004T
SETA SE0004N se SE0004R
GTOL 0.000001
MERG p SE0004H
MERG l SE0004H
MERG s SE0004H
SETA SE00001 se SE0004H
SETA SE00004 se SE0004K
SETA SE00002 se SE0004I
SETA SE00005 se SE0004L
SETA SE00008 se SE0004N
SETA SE00008 se SE00041
SETA SE00008 se SE00044
PNT SE00050 0.000000000 0.030633333 0.000000000
SETA SE00050 p SE00050
SETA SE00051 se SE00050
COMP SE00051 up
SWEP SE00051 SE00052 tra 0.00000000000 0.00000000000 0.00700000000 2 a
COMP SE00051 do
COMP SE00052 do
SETA SE00053 se SE00050
COMP SE00053 up
SWEP SE00053 SE00054 tra 0.00000000000 0.00355000000 0.00000000000 1 a
COMP SE00053 do
COMP SE00054 do
SETA SE00055 se SE00050
COMP SE00055 up
SWEP SE00055 SE00056 tra 0.07500000000 0.00000000000 0.00000000000 4 a
COMP SE00055 do
COMP SE00056 do
SETA SE0004Z se SE00050
COMP SE0004Z up
COMP SE0004Z do
SETA SE00057 se SE0004Z
SETR SE00057 se SE00055
SETR SE00057 se SE00056
BIA SE00057 1.000
SETA SE00058 se SE0004Z
SETR SE00058 se SE00053
SETR SE00058 se SE00054
BIA SE00058 1.000
SETA SE00059 se SE0004Z
SETR SE00059 se SE00051
SETR SE00059 se SE00052
BIA SE00059 1.000
SETA SE00001 se SE0004Z
SETA SE00004 se SE00051
SETA SE00002 se SE00055
SETA SE00005 se SE00056
PNT SE0005I 0.000000000 0.030633333 0.007000000
SETA SE0005I p SE0005I
SETA SE0005J se SE0005I
COMP SE0005J up
SWEP SE0005J SE0005K tra 0.00000000000 0.00000000000 0.04300000000 2.0 a
COMP SE0005J do
COMP SE0005K do
SETA SE0005L se SE0005I
COMP SE0005L up
SWEP SE0005L SE0005M tra 0.00000000000 0.00355000000 0.00000000000 1.0 a
COMP SE0005L do
COMP SE0005M do
SETA SE0005N se SE0005I
COMP SE0005N up
SWEP SE0005N SE0005O tra 0.07500000000 0.00000000000 0.00000000000 4.0 a
COMP SE0005N do
COMP SE0005O do
SETA SE0005H se SE0005I
COMP SE0005H up
COMP SE0005H do
SETA SE0005P se SE0005H
SETR SE0005P se SE0005N
SETR SE0005P se SE0005O
BIA SE0005P 1.000
SETA SE0005Q se SE0005H
SETR SE0005Q se SE0005L
SETR SE0005Q se SE0005M
BIA SE0005Q 1.000
SETA SE0005R se SE0005H
SETR SE0005R se SE0005J
SETR SE0005R se SE0005K
BIA SE0005R 1.000
SETA SE0005A se SE0005H
SETA SE0005B se SE0005N
SETA SE0005C se SE0005L
SETA SE0005D se SE0005J
SETA SE0005E se SE0005O
SETA SE0005F se SE0005M
SETA SE0005G se SE0005K
GTOL 0.000001
MERG p SE0005A
MERG l SE0005A
MERG s SE0005A
SETA SE00001 se SE0005A
SETA SE00007 se SE0005G
SETA SE00002 se SE0005B
SETA SE00005 se SE0005E
PNT SE00060 0.000000000 0.026525000 0.000000000
SETA SE00060 p SE00060
SETA SE00061 se SE00060
COMP SE00061 up
SWEP SE00061 SE00062 tra 0.00000000000 0.00000000000 0.00700000000 2.0 a
COMP SE00061 do
COMP SE00062 do
SETA SE00063 se SE00060
COMP SE00063 up
SWEP SE00063 SE00064 tra 0.00000000000 0.00410833333 0.00000000000 1.0 a
COMP SE00063 do
COMP SE00064 do
SETA SE00065 se SE00060
COMP SE00065 up
SWEP SE00065 SE00066 tra 0.07500000000 0.00000000000 0.00000000000 4.0 a
COMP SE00065 do
COMP SE00066 do
SETA SE0005Z se SE00060
COMP SE0005Z up
COMP SE0005Z do
SETA SE00067 se SE0005Z
SETR SE00067 se SE00065
SETR SE00067 se SE00066
BIA SE00067 1.000
SETA SE00068 se SE0005Z
SETR SE00068 se SE00063
SETR SE00068 se SE00064
BIA SE00068 1.000
SETA SE00069 se SE0005Z
SETR SE00069 se SE00061
SETR SE00069 se SE00062
BIA SE00069 1.000
SETA SE0005S se SE0005Z
SETA SE0005T se SE00065
SETA SE0005U se SE00063
SETA SE0005V se SE00061
SETA SE0005W se SE00066
SETA SE0005X se SE00064
SETA SE0005Y se SE00062
GTOL 0.000001
MERG p SE0005S
MERG l SE0005S
MERG s SE0005S
SETA SE00001 se SE0005S
SETA SE00004 se SE0005V
SETA SE00002 se SE0005T
SETA SE00005 se SE0005W
SETA SE00008 se SE0005Y
SETA SE00008 se SE0005C
SETA SE00008 se SE0005F
PNT SE0006B 0.000000000 0.038291667 0.000000000
SETA SE0006B p SE0006B
SETA SE0006C se SE0006B
COMP SE0006C up
SWEP SE0006C SE0006D tra 0.00000000000 0.00000000000 0.00700000000 2 a
COMP SE0006C do
COMP SE0006D do
SETA SE0006E se SE0006B
COMP SE0006E up
SWEP SE0006E SE0006F tra 0.00000000000 0.00355000000 0.00000000000 1 a
COMP SE0006E do
COMP SE0006F do
SETA SE0006G se SE0006B
COMP SE0006G up
SWEP SE0006G SE0006H tra 0.07500000000 0.00000000000 0.00000000000 4 a
COMP SE0006G do
COMP SE0006H do
SETA SE0006A se SE0006B
COMP SE0006A up
COMP SE0006A do
SETA SE0006I se SE0006A
SETR SE0006I se SE0006G
SETR SE0006I se SE0006H
BIA SE0006I 1.000
SETA SE0006J se SE0006A
SETR SE0006J se SE0006E
SETR SE0006J se SE0006F
BIA SE0006J 1.000
SETA SE0006K se SE0006A
SETR SE0006K se SE0006C
SETR SE0006K se SE0006D
BIA SE0006K 1.000
SETA SE00001 se SE0006A
SETA SE00004 se SE0006C
SETA SE00002 se SE0006G
SETA SE00005 se SE0006H
PNT SE0006T 0.000000000 0.038291667 0.007000000
SETA SE0006T p SE0006T
SETA SE0006U se SE0006T
COMP SE0006U up
SWEP SE0006U SE0006V tra 0.00000000000 0.00000000000 0.04300000000 2.0 a
COMP SE0006U do
COMP SE0006V do
SETA SE0006W se SE0006T
COMP SE0006W up
SWEP SE0006W SE0006X tra 0.00000000000 0.00355000000 0.00000000000 1.0 a
COMP SE0006W do
COMP SE0006X do
SETA SE0006Y se SE0006T
COMP SE0006Y up
SWEP SE0006Y SE0006Z tra 0.07500000000 0.00000000000 0.00000000000 4.0 a
COMP SE0006Y do
COMP SE0006Z do
SETA SE0006S se SE0006T
COMP SE0006S up
COMP SE0006S do
SETA SE00070 se SE0006S
SETR SE00070 se SE0006Y
SETR SE00070 se SE0006Z
BIA SE00070 1.000
SETA SE00071 se SE0006S
SETR SE00071 se SE0006W
SETR SE00071 se SE0006X
BIA SE00071 1.000
SETA SE00072 se SE0006S
SETR SE00072 se SE0006U
SETR SE00072 se SE0006V
BIA SE00072 1.000
SETA SE0006L se SE0006S
SETA SE0006M se SE0006Y
SETA SE0006N se SE0006W
SETA SE0006O se SE0006U
SETA SE0006P se SE0006Z
SETA SE0006Q se SE0006X
SETA SE0006R se SE0006V
GTOL 0.000001
MERG p SE0006L
MERG l SE0006L
MERG s SE0006L
SETA SE00001 se SE0006L
SETA SE00007 se SE0006R
SETA SE00002 se SE0006M
SETA SE00005 se SE0006P
PNT SE0007B 0.000000000 0.034183333 0.000000000
SETA SE0007B p SE0007B
SETA SE0007C se SE0007B
COMP SE0007C up
SWEP SE0007C SE0007D tra 0.00000000000 0.00000000000 0.00700000000 2.0 a
COMP SE0007C do
COMP SE0007D do
SETA SE0007E se SE0007B
COMP SE0007E up
SWEP SE0007E SE0007F tra 0.00000000000 0.00410833333 0.00000000000 1.0 a
COMP SE0007E do
COMP SE0007F do
SETA SE0007G se SE0007B
COMP SE0007G up
SWEP SE0007G SE0007H tra 0.07500000000 0.00000000000 0.00000000000 4.0 a
COMP SE0007G do
COMP SE0007H do
SETA SE0007A se SE0007B
COMP SE0007A up
COMP SE0007A do
SETA SE0007I se SE0007A
SETR SE0007I se SE0007G
SETR SE0007I se SE0007H
BIA SE0007I 1.000
SETA SE0007J se SE0007A
SETR SE0007J se SE0007E
SETR SE0007J se SE0007F
BIA SE0007J 1.000
SETA SE0007K se SE0007A
SETR SE0007K se SE0007C
SETR SE0007K se SE0007D
BIA SE0007K 1.000
SETA SE00073 se SE0007A
SETA SE00074 se SE0007G
SETA SE00075 se SE0007E
SETA SE00076 se SE0007C
SETA SE00077 se SE0007H
SETA SE00078 se SE0007F
SETA SE00079 se SE0007D
GTOL 0.000001
MERG p SE00073
MERG l SE00073
MERG s SE00073
SETA SE00001 se SE00073
SETA SE00004 se SE00076
SETA SE00002 se SE00074
SETA SE00005 se SE00077
SETA SE00008 se SE00079
SETA SE00008 se SE0006N
SETA SE00008 se SE0006Q
PNT SE0007M 0.000000000 0.045950000 0.000000000
SETA SE0007M p SE0007M
SETA SE0007N se SE0007M
COMP SE0007N up
SWEP SE0007N SE0007O tra 0.00000000000 0.00000000000 0.00700000000 2 a
COMP SE0007N do
COMP SE0007O do
SETA SE0007P se SE0007M
COMP SE0007P up
SWEP SE0007P SE0007Q tra 0.00000000000 0.00355000000 0.00000000000 1 a
COMP SE0007P do
COMP SE0007Q do
SETA SE0007R se SE0007M
COMP SE0007R up
SWEP SE0007R SE0007S tra 0.07500000000 0.00000000000 0.00000000000 4 a
COMP SE0007R do
COMP SE0007S do
SETA SE0007L se SE0007M
COMP SE0007L up
COMP SE0007L do
SETA SE0007T se SE0007L
SETR SE0007T se SE0007R
SETR SE0007T se SE0007S
BIA SE0007T 1.000
SETA SE0007U se SE0007L
SETR SE0007U se SE0007P
SETR SE0007U se SE0007Q
BIA SE0007U 1.000
SETA SE0007V se SE0007L
SETR SE0007V se SE0007N
SETR SE0007V se SE0007O
BIA SE0007V 1.000
SETA SE00001 se SE0007L
SETA SE00004 se SE0007N
SETA SE00002 se SE0007R
SETA SE00005 se SE0007S
PNT SE00084 0.000000000 0.045950000 0.007000000
SETA SE00084 p SE00084
SETA SE00085 se SE00084
COMP SE00085 up
SWEP SE00085 SE00086 tra 0.00000000000 0.00000000000 0.04300000000 2.0 a
COMP SE00085 do
COMP SE00086 do
SETA SE00087 se SE00084
COMP SE00087 up
SWEP SE00087 SE00088 tra 0.00000000000 0.00355000000 0.00000000000 1.0 a
COMP SE00087 do
COMP SE00088 do
SETA SE00089 se SE00084
COMP SE00089 up
SWEP SE00089 SE0008A tra 0.07500000000 0.00000000000 0.00000000000 4.0 a
COMP SE00089 do
COMP SE0008A do
SETA SE00083 se SE00084
COMP SE00083 up
COMP SE00083 do
SETA SE0008B se SE00083
SETR SE0008B se SE00089
SETR SE0008B se SE0008A
BIA SE0008B 1.000
SETA SE0008C se SE00083
SETR SE0008C se SE00087
SETR SE0008C se SE00088
BIA SE0008C 1.000
SETA SE0008D se SE00083
SETR SE0008D se SE00085
SETR SE0008D se SE00086
BIA SE0008D 1.000
SETA SE0007W se SE00083
SETA SE0007X se SE00089
SETA SE0007Y se SE00087
SETA SE0007Z se SE00085
SETA SE00080 se SE0008A
SETA SE00081 se SE00088
SETA SE00082 se SE00086
GTOL 0.000001
MERG p SE0007W
MERG l SE0007W
MERG s SE0007W
SETA SE00001 se SE0007W
SETA SE00007 se SE00082
SETA SE00002 se SE0007X
SETA SE00005 se SE00080
PNT SE0008M 0.000000000 0.041841667 0.000000000
SETA SE0008M p SE0008M
SETA SE0008N se SE0008M
COMP SE0008N up
SWEP SE0008N SE0008O tra 0.00000000000 0.00000000000 0.00700000000 2.0 a
COMP SE0008N do
COMP SE0008O do
SETA SE0008P se SE0008M
COMP SE0008P up
SWEP SE0008P SE0008Q tra 0.00000000000 0.00410833333 0.00000000000 1.0 a
COMP SE0008P do
COMP SE0008Q do
SETA SE0008R se SE0008M
COMP SE0008R up
SWEP SE0008R SE0008S tra 0.07500000000 0.00000000000 0.00000000000 4.0 a
COMP SE0008R do
COMP SE0008S do
SETA SE0008L se SE0008M
COMP SE0008L up
COMP SE0008L do
SETA SE0008T se SE0008L
SETR SE0008T se SE0008R
SETR SE0008T se SE0008S
BIA SE0008T 1.000
SETA SE0008U se SE0008L
SETR SE0008U se SE0008P
SETR SE0008U se SE0008Q
BIA SE0008U 1.000
SETA SE0008V se SE0008L
SETR SE0008V se SE0008N
SETR SE0008V se SE0008O
BIA SE0008V 1.000
SETA SE0008E se SE0008L
SETA SE0008F se SE0008R
SETA SE0008G se SE0008P
SETA SE0008H se SE0008N
SETA SE0008I se SE0008S
SETA SE0008J se SE0008Q
SETA SE0008K se SE0008O
GTOL 0.000001
MERG p SE0008E
MERG l SE0008E
MERG s SE0008E
SETA SE00001 se SE0008E
SETA SE00004 se SE0008H
SETA SE00002 se SE0008F
SETA SE00005 se SE0008I
SETA SE00008 se SE0008K
SETA SE00006 se SE0007Q
SETA SE00006 se SE00081
SETA SE00008 se SE0007Y
GTOL 0.000001
MERG p SE00001
MERG l SE00001
MERG s SE00001
COMP SE00008 do
SETA SE0008W se SE00002
SETA SE0008W se SE00005
SETA SE0008W se SE00003
SETA SE0008W se SE00006
SETA SE0008W se SE00007
SETA SE0008W se SE00008
SETA top se SE00005
SETA bottom se SE00002
SETA channel se SE00008
SETA walls se SE00004
SETA walls se SE00007
SETA walls se SE00003
SETA walls se SE00006
SETA flux se SE00004
DEL se SE00001
DEL se SE00002
DEL se SE00003
DEL se SE00004
DEL se SE00005
DEL se SE00006
DEL se SE00007
DEL se SE00008
DEL se SE00009
DEL se SE0000A
DEL se SE0000B
DEL se SE0000C
DEL se SE0000D
DEL se SE0000E
DEL se SE0000F
DEL se SE0000G
DEL se SE0000H
DEL se SE0000I
DEL se SE0000J
DEL se SE0000K
DEL se SE0000L
DEL se SE0000M
DEL se SE0000N
DEL se SE0000O
DEL se SE0000P
DEL se SE0000Q
DEL se SE0000R
DEL se SE0000S
DEL se SE0000T
DEL se SE0000U
DEL se SE0000V
DEL se SE0000W
DEL se SE0000X
DEL se SE0000Y
DEL se SE0000Z
DEL se SE00010
DEL se SE00011
DEL se SE00012
DEL se SE00013
DEL se SE00014
DEL se SE00015
DEL se SE00016
DEL se SE00017
DEL se SE00018
DEL se SE00019
DEL se SE0001A
DEL se SE0001B
DEL se SE0001C
DEL se SE0001D
DEL se SE0001E
DEL se SE0001F
DEL se SE0001G
DEL se SE0001H
DEL se SE0001I
DEL se SE0001J
DEL se SE0001K
DEL se SE0001L
DEL se SE0001M
DEL se SE0001N
DEL se SE0001O
DEL se SE0001P
DEL se SE0001Q
DEL se SE0001R
DEL se SE0001S
DEL se SE0001T
DEL se SE0001U
DEL se SE0001V
DEL se SE0001W
DEL se SE0001X
DEL se SE0001Y
DEL se SE0001Z
DEL se SE00020
DEL se SE00021
DEL se SE00022
DEL se SE00023
DEL se SE00024
DEL se SE00025
DEL se SE00026
DEL se SE00027
DEL se SE00028
DEL se SE00029
DEL se SE0002A
DEL se SE0002B
DEL se SE0002C
DEL se SE0002D
DEL se SE0002E
DEL se SE0002F
DEL se SE0002G
DEL se SE0002H
DEL se SE0002I
DEL se SE0002J
DEL se SE0002K
DEL se SE0002L
DEL se SE0002M
DEL se SE0002N
DEL se SE0002O
DEL se SE0002P
DEL se SE0002Q
DEL se SE0002R
DEL se SE0002S
DEL se SE0002T
DEL se SE0002U
DEL se SE0002V
DEL se SE0002W
DEL se SE0002X
DEL se SE0002Y
DEL se SE0002Z
DEL se SE00030
DEL se SE00031
DEL se SE00032
DEL se SE00033
DEL se SE00034
DEL se SE00035
DEL se SE00036
DEL se SE00037
DEL se SE00038
DEL se SE00039
DEL se SE0003A
DEL se SE0003B
DEL se SE0003C
DEL se SE0003D
DEL se SE0003E
DEL se SE0003F
DEL se SE0003G
DEL se SE0003H
DEL se SE0003I
DEL se SE0003J
DEL se SE0003K
DEL se SE0003L
DEL se SE0003M
DEL se SE0003N
DEL se SE0003O
DEL se SE0003P
DEL se SE0003Q
DEL se SE0003R
DEL se SE0003S
DEL se SE0003T
DEL se SE0003U
DEL se SE0003V
DEL se SE0003W
DEL se SE0003X
DEL se SE0003Y
DEL se SE0003Z
DEL se SE00040
DEL se SE00041
DEL se SE00042
DEL se SE00043
DEL se SE00044
DEL se SE00045
DEL se SE00046
DEL se SE00047
DEL se SE00048
DEL se SE00049
DEL se SE0004A
DEL se SE0004B
DEL se SE0004C
DEL se SE0004D
DEL se SE0004E
DEL se SE0004F
DEL se SE0004G
DEL se SE0004H
DEL se SE0004I
DEL se SE0004J
DEL se SE0004K
DEL se SE0004L
DEL se SE0004M
DEL se SE0004N
DEL se SE0004O
DEL se SE0004P
DEL se SE0004Q
DEL se SE0004R
DEL se SE0004S
DEL se SE0004T
DEL se SE0004U
DEL se SE0004V
DEL se SE0004W
DEL se SE0004X
DEL se SE0004Y
DEL se SE0004Z
DEL se SE00050
DEL se SE00051
DEL se SE00052
DEL se SE00053
DEL se SE00054
DEL se SE00055
DEL se SE00056
DEL se SE00057
DEL se SE00058
DEL se SE00059
DEL se SE0005A
DEL se SE0005B
DEL se SE0005C
DEL se SE0005D
DEL se SE0005E
DEL se SE0005F
DEL se SE0005G
DEL se SE0005H
DEL se SE0005I
DEL se SE0005J
DEL se SE0005K
DEL se SE0005L
DEL se SE0005M
DEL se SE0005N
DEL se SE0005O
DEL se SE0005P
DEL se SE0005Q
DEL se SE0005R
DEL se SE0005S
DEL se SE0005T
DEL se SE0005U
DEL se SE0005V
DEL se SE0005W
DEL se SE0005X
DEL se SE0005Y
DEL se SE0005Z
DEL se SE00060
DEL se SE00061
DEL se SE00062
DEL se SE00063
DEL se SE00064
DEL se SE00065
DEL se SE00066
DEL se SE00067
DEL se SE00068
DEL se SE00069
DEL se SE0006A
DEL se SE0006B
DEL se SE0006C
DEL se SE0006D
DEL se SE0006E
DEL se SE0006F
DEL se SE0006G
DEL se SE0006H
DEL se SE0006I
DEL se SE0006J
DEL se SE0006K
DEL se SE0006L
DEL se SE0006M
DEL se SE0006N
DEL se SE0006O
DEL se SE0006P
DEL se SE0006Q
DEL se SE0006R
DEL se SE0006S
DEL se SE0006T
DEL se SE0006U
DEL se SE0006V
DEL se SE0006W
DEL se SE0006X
DEL se SE0006Y
DEL se SE0006Z
DEL se SE00070
DEL se SE00071
DEL se SE00072
DEL se SE00073
DEL se SE00074
DEL se SE00075
DEL se SE00076
DEL se SE00077
DEL se SE00078
DEL se SE00079
DEL se SE0007A
DEL se SE0007B
DEL se SE0007C
DEL se SE0007D
DEL se SE0007E
DEL se SE0007F
DEL se SE0007G
DEL se SE0007H
DEL se SE0007I
DEL se SE0007J
DEL se SE0007K
DEL se SE0007L
DEL se SE0007M
DEL se SE0007N
DEL se SE0007O
DEL se SE0007P
DEL se SE0007Q
DEL se SE0007R
DEL se SE0007S
DEL se SE0007T
DEL se SE0007U
DEL se SE0007V
DEL se SE0007W
DEL se SE0007X
DEL se SE0007Y
DEL se SE0007Z
DEL se SE00080
DEL se SE00081
DEL se SE00082
DEL se SE00083
DEL se SE00084
DEL se SE00085
DEL se SE00086
DEL se SE00087
DEL se SE00088
DEL se SE00089
DEL se SE0008A
DEL se SE0008B
DEL se SE0008C
DEL se SE0008D
DEL se SE0008E
DEL se SE0008F
DEL se SE0008G
DEL se SE0008H
DEL se SE0008I
DEL se SE0008J
DEL se SE0008K
DEL se SE0008L
DEL se SE0008M
DEL se SE0008N
DEL se SE0008O
DEL se SE0008P
DEL se SE0008Q
DEL se SE0008R
DEL se SE0008S
DEL se SE0008T
DEL se SE0008U
DEL se SE0008V
DEL se SE0008W
