*INCLUDE, INPUT=all.msh
*MATERIAL, Name=Aluminium
*CONDUCTIVITY
  200.,0.
*SOLID SECTION, Elset=Eall, Material=Aluminium
*INITIAL CONDITIONS,TYPE=TEMPERATURE
  Nall,10.
*AMPLITUDE, NAME=Aflux
  0., .4167
*STEP
*HEAT TRANSFER,STEADY STATE
*DFLUX, AMPLITUDE=Aflux
  Eall,BF,1770.
*FILM
*INCLUDE, INPUT=air.flm
*EL FILE
  HFL
*NODE FILE
  NT,RFL
*END STEP
